<?xml version="1.0"?>
<!-- Generated by tools/jsbsim_validate/gen_jsbsim.py from FALCON-S airframe Navion.
     Out of ground effect, no rate damping, no engine. Do not hand-edit; regenerate. -->
<fdm_config name="Navion_falcons" version="2.0" release="ALPHA">

 <fileheader>
  <author>tools/jsbsim_validate/gen_jsbsim.py</author>
  <description>FALCON-S Navion, out of ground effect</description>
 </fileheader>

 <metrics>
  <wingarea unit="M2">17.112</wingarea>
  <wingspan unit="M">10.19</wingspan>
  <chord unit="M">1.74</chord>
  <!-- Aerodynamic reference point on the CG: FALCON-S applies aerodynamic forces at the CG,
       so any offset here would add a moment arm it does not have. -->
  <location name="AERORP" unit="M"><x>0.0</x><y>0.0</y><z>0.0</z></location>
 </metrics>

 <mass_balance>
  <!-- slug*ft^2, converted here rather than by JSBSim; see KGM2_PER_SLUGFT2 in the generator.
       JSBSim's default cross-product convention puts +ixz at J[0][2], which is the FALCON-S
       inertia matrix entry, so these transfer sign-for-sign. -->
  <ixx unit="SLUG*FT2">1285.07666</ixx>
  <iyy unit="SLUG*FT2">2775.00383</iyy>
  <izz unit="SLUG*FT2">3237.234029</izz>
  <ixy unit="SLUG*FT2">0</ixy>
  <ixz unit="SLUG*FT2">110.2655413</ixz>
  <iyz unit="SLUG*FT2">0</iyz>
  <emptywt unit="KG">1293.0</emptywt>
  <location name="CG" unit="M"><x>0.0</x><y>0.0</y><z>0.0</z></location>
 </mass_balance>

 <ground_reactions/>
 <propulsion/>

 <flight_control name="command to degrees">
  <channel name="surfaces">
    <pure_gain name="fcs/elevator-deg">
     <input>fcs/elevator-cmd-norm</input>
     <gain>20.0</gain>
    </pure_gain>
    <pure_gain name="fcs/aileron-deg">
     <input>fcs/aileron-cmd-norm</input>
     <gain>20.0</gain>
    </pure_gain>
    <pure_gain name="fcs/rudder-deg">
     <input>fcs/rudder-cmd-norm</input>
     <gain>15.0</gain>
    </pure_gain>
  </channel>
 </flight_control>

 <aerodynamics>

  <function name="aero/coeff/CD">
   <description>CD from Navion_poly.csv, alpha x delta_e</description>
   <table>
     <independentVar lookup="row">aero/alpha-deg</independentVar>
     <independentVar lookup="column">fcs/elevator-deg</independentVar>
     <tableData>
                                -20             -15             -10              -5               0               5              10              15              20
          -180.0000  1.57466930e+01  1.58199038e+01  1.58931337e+01  1.59662817e+01  1.60392463e+01  1.61119264e+01  1.61842207e+01  1.62560279e+01  1.63272468e+01
          -164.0000  1.28302753e+01  1.29021218e+01  1.29742240e+01  1.30464806e+01  1.31187904e+01  1.31910521e+01  1.32631645e+01  1.33350264e+01  1.34065365e+01
          -148.0000  1.02380155e+01  1.03073573e+01  1.03771912e+01  1.04474161e+01  1.05179307e+01  1.05886337e+01  1.06594239e+01  1.07302000e+01  1.08008608e+01
          -132.0000  7.96096296e+00  8.02665967e+00  8.09308505e+00  8.16013785e+00  8.22771682e+00  8.29572072e+00  8.36404829e+00  8.43259827e+00  8.50126943e+00
          -116.0000  5.99016714e+00  6.05107839e+00  6.11295480e+00  6.17569513e+00  6.23919811e+00  6.30336251e+00  6.36808706e+00  6.43327053e+00  6.49881165e+00
          -100.0000  4.31667748e+00  4.37166289e+00  4.42784995e+00  4.48513741e+00  4.54342402e+00  4.60260852e+00  4.66258968e+00  4.72326623e+00  4.78453694e+00
           -84.0000  2.93154341e+00  2.97946259e+00  3.02881991e+00  3.07951412e+00  3.13144397e+00  3.18450821e+00  3.23860558e+00  3.29363484e+00  3.34949473e+00
           -68.0000  1.82581438e+00  1.86552695e+00  1.90691414e+00  1.94987471e+00  1.99430741e+00  2.04011099e+00  2.08718419e+00  2.13542577e+00  2.18473447e+00
           -52.0000  9.90539817e-01  1.02090538e+00  1.05318207e+00  1.08726862e+00  1.12306378e+00  1.16046632e+00  1.19937496e+00  1.23968847e+00  1.28130559e+00
           -36.0000  4.16769158e-01  4.36647338e-01  4.58673125e-01  4.82745267e-01  5.08762514e-01  5.36623615e-01  5.66227319e-01  5.97472376e-01  6.30257534e-01
           -20.0000  9.55518409e-02  1.03802249e-01  1.14436753e-01  1.27354101e-01  1.42453042e-01  1.59632326e-01  1.78790702e-01  1.99826919e-01  2.22639726e-01
            -4.0000  1.79373015e-02  1.34195521e-02  1.15223865e-02  1.21445541e-02  1.51848038e-02  2.05418850e-02  2.81145468e-02  3.78015384e-02  4.95016088e-02
            12.0000  1.74974976e-01  1.56548683e-01  1.40979462e-01  1.28166064e-01  1.18007236e-01  1.10401728e-01  1.05248290e-01  1.02445670e-01  1.01892617e-01
            28.0000  5.57714302e-01  5.24239079e-01  4.93857417e-01  4.66468066e-01  4.41969774e-01  4.20261291e-01  4.01241367e-01  3.84808749e-01  3.70862188e-01
            44.0000  1.15720471e+00  1.10754017e+00  1.06120569e+00  1.01810000e+00  9.78121855e-01  9.41170012e-01  9.07143215e-01  8.75940214e-01  8.47459758e-01
            60.0000  1.96449565e+00  1.89750141e+00  1.83407371e+00  1.77411129e+00  1.71751292e+00  1.66417732e+00  1.61400327e+00  1.56688950e+00  1.52273476e+00
            76.0000  2.97063654e+00  2.88517222e+00  2.80351091e+00  2.72555139e+00  2.65119239e+00  2.58033267e+00  2.51287097e+00  2.44870604e+00  2.38773664e+00
            92.0000  4.16667683e+00  4.06160203e+00  3.96056675e+00  3.86346972e+00  3.77020972e+00  3.68068548e+00  3.59479575e+00  3.51243928e+00  3.43351482e+00
           108.0000  5.54366596e+00  5.41784029e+00  5.29629064e+00  5.17891573e+00  5.06561433e+00  4.95628519e+00  4.85082704e+00  4.74913865e+00  4.65111875e+00
           124.0000  7.09265335e+00  6.94493644e+00  6.80173203e+00  6.66293885e+00  6.52845567e+00  6.39818124e+00  6.27201429e+00  6.14985358e+00  6.03159786e+00
           140.0000  8.80468844e+00  8.63393990e+00  8.46794035e+00  8.30658852e+00  8.14978317e+00  7.99742306e+00  7.84940692e+00  7.70563351e+00  7.56600158e+00
           156.0000  1.06708207e+01  1.04759001e+01  1.02859650e+01  1.01009142e+01  9.92064627e+00  9.74506009e+00  9.57405438e+00  9.40752789e+00  9.24537936e+00
           172.0000  1.26820995e+01  1.24618665e+01  1.22468555e+01  1.20369652e+01  1.18320944e+01  1.16321418e+01  1.14370061e+01  1.12465861e+01  1.10607806e+01
           180.0000  1.37393718e+01  1.35060550e+01  1.32780784e+01  1.30553408e+01  1.28377408e+01  1.26251773e+01  1.24175490e+01  1.22147547e+01  1.20166930e+01
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     </tableData>
   </table>
  </function>
  <function name="aero/coeff/CY">
   <description>CY from Navion_poly.csv, beta x delta_r</description>
   <table>
     <independentVar lookup="row">aero/beta-deg</independentVar>
     <independentVar lookup="column">fcs/rudder-deg</independentVar>
     <tableData>
                                -15             -10              -5               0               5              10              15
           -90.0000 -2.87616802e-01 -2.55680371e-01 -2.27823908e-01 -2.03538643e-01 -1.82315806e-01 -1.63646628e-01 -1.47022339e-01
           -82.0000 -1.44260764e-01 -1.19737349e-01 -9.90228751e-02 -8.16085723e-02 -6.69856713e-02 -5.46454027e-02 -4.40789969e-02
           -74.0000 -3.19831440e-02 -1.42444875e-02 -4.37455330e-05  1.11278514e-02  1.97790730e-02  2.64186886e-02  3.15554678e-02
           -66.0000  5.21131264e-02  6.36952809e-02  7.20105472e-02  7.75676949e-02  8.08754936e-02  8.24427127e-02  8.27781219e-02
           -58.0000  1.10925114e-01  1.16979023e-01  1.20037070e-01  1.20608025e-01  1.19200658e-01  1.16323737e-01  1.12486032e-01
           -50.0000  1.47349886e-01  1.48503806e-01  1.46932891e-01  1.43145909e-01  1.37651632e-01  1.30958828e-01  1.23576267e-01
           -42.0000  1.64284509e-01  1.61166697e-01  1.55595075e-01  1.48078415e-01  1.39125484e-01  1.29245053e-01  1.18945891e-01
           -34.0000  1.64626051e-01  1.57864763e-01  1.48920692e-01  1.38302608e-01  1.26519281e-01  1.14079479e-01  1.01491974e-01
           -26.0000  1.51271578e-01  1.41495070e-01  1.29806807e-01  1.16715556e-01  1.02730089e-01  8.83591740e-02  7.41115812e-02
           -18.0000  1.27118158e-01  1.14954687e-01  1.01150487e-01  8.62143268e-02  7.06549758e-02  5.49812038e-02  3.97017802e-02
           -10.0000  9.50628568e-02  8.11406802e-02  6.58488003e-02  4.96959866e-02  3.31910087e-02  1.68426360e-02  1.15963825e-03
            -2.0000  5.80027428e-02  4.29501165e-02  2.67988133e-02  1.00576027e-02 -6.76474566e-03 -2.31594623e-02 -3.86177778e-02
             6.0000  1.88348825e-02  3.28006310e-03 -1.31024068e-02 -2.98037577e-02 -4.63152200e-02 -6.21280242e-02 -7.67334007e-02
            14.0000 -1.95436569e-02 -3.49724129e-02 -5.09577930e-02 -6.69910277e-02 -8.25633473e-02 -9.71659825e-02 -1.10290164e-01
            22.0000 -5.42358085e-02 -6.89102445e-02 -8.38702782e-02 -9.86071401e-02 -1.12612061e-01 -1.25376270e-01 -1.36390999e-01
            30.0000 -8.23445051e-02 -9.56363645e-02 -1.08942795e-01 -1.21755028e-01 -1.33564293e-01 -1.43861820e-01 -1.52138841e-01
            38.0000 -1.00972680e-01 -1.12253706e-01 -1.23278277e-01 -1.33537624e-01 -1.42522976e-01 -1.49725565e-01 -1.54636621e-01
            46.0000 -1.07223265e-01 -1.15865202e-01 -1.23979657e-01 -1.31057861e-01 -1.36591045e-01 -1.40070438e-01 -1.40987272e-01
            54.0000 -9.81991942e-02 -1.03573785e-01 -1.08149867e-01 -1.11418673e-01 -1.12871431e-01 -1.11999373e-01 -1.08293728e-01
            62.0000 -7.10034001e-02 -7.24823880e-02 -7.28918416e-02 -7.17229913e-02 -6.84670675e-02 -6.26153009e-02 -5.36589217e-02
            70.0000 -2.27388158e-02 -1.96939444e-02 -1.53085122e-02 -9.07374983e-03 -4.80887617e-04  1.09788439e-02  2.58142144e-02
            78.0000  4.94916261e-02  5.76886133e-02  6.74971876e-02  7.94261187e-02  9.39841759e-02  1.11680129e-01  1.33022747e-01
            86.0000  1.48584992e-01  1.62562352e-01  1.78422325e-01  1.96673681e-01  2.17825190e-01  2.42385621e-01  2.70863744e-01
            90.0000  2.09110606e-01  2.26213748e-01  2.45335016e-01  2.66983181e-01  2.91667012e-01  3.19895278e-01  3.52176749e-01
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     </tableData>
   </table>
  </function>
  <function name="aero/coeff/CL">
   <description>CL from Navion_poly.csv, alpha x delta_e</description>
   <table>
     <independentVar lookup="row">aero/alpha-deg</independentVar>
     <independentVar lookup="column">fcs/elevator-deg</independentVar>
     <tableData>
                                -20             -15             -10              -5               0               5              10              15              20
          -180.0000  2.60068642e+00  2.74634242e+00  2.90431808e+00  3.07646842e+00  3.26464848e+00  3.47071326e+00  3.69651781e+00  3.94391714e+00  4.21476628e+00
          -164.0000 -4.58336818e-01 -3.50078406e-01 -2.31060986e-01 -9.94295318e-02  4.66709802e-02  2.09095575e-01  3.89699277e-01  5.90337111e-01  8.12864103e-01
          -148.0000 -2.68912687e+00 -2.61441387e+00 -2.53050251e+00 -2.43553777e+00 -2.32766462e+00 -2.20502804e+00 -2.06577301e+00 -1.90804450e+00 -1.72998748e+00
          -132.0000 -4.17805140e+00 -4.13303163e+00 -4.08037415e+00 -4.01822395e+00 -3.94472599e+00 -3.85802525e+00 -3.75626670e+00 -3.63759533e+00 -3.50015611e+00
          -116.0000 -5.01147805e+00 -4.99229934e+00 -4.96704357e+00 -4.93385572e+00 -4.89088077e+00 -4.83626369e+00 -4.76814946e+00 -4.68468306e+00 -4.58400945e+00
          -100.0000 -5.27577449e+00 -5.27858465e+00 -5.27687841e+00 -5.26880074e+00 -5.25249663e+00 -5.22611103e+00 -5.18778894e+00 -5.13567532e+00 -5.06791516e+00
           -84.0000 -5.05730836e+00 -5.07825522e+00 -5.09624634e+00 -5.10942667e+00 -5.11594121e+00 -5.11393493e+00 -5.10155279e+00 -5.07693979e+00 -5.03824089e+00
           -68.0000 -4.44244733e+00 -4.47767871e+00 -4.51151500e+00 -4.54210116e+00 -4.56758218e+00 -4.58610303e+00 -4.59580868e+00 -4.59484411e+00 -4.58135429e+00
           -52.0000 -3.51755904e+00 -3.56322277e+00 -3.60905206e+00 -3.65319187e+00 -3.69378719e+00 -3.72898299e+00 -3.75692425e+00 -3.77575593e+00 -3.78362303e+00
           -36.0000 -2.36901116e+00 -2.42125506e+00 -2.47522517e+00 -2.52906645e+00 -2.58092390e+00 -2.62894247e+00 -2.67126716e+00 -2.70604293e+00 -2.73141475e+00
           -20.0000 -1.08317134e+00 -1.13814323e+00 -1.19640198e+00 -1.25609256e+00 -1.31535995e+00 -1.37234913e+00 -1.42520507e+00 -1.47207274e+00 -1.51109712e+00
            -4.0000  2.53592769e-01  1.99745063e-01  1.41049847e-01  7.93621453e-02  1.65369828e-02 -4.55706158e-02 -1.05105626e-01 -1.60213023e-01 -2.09037782e-01
            12.0000  1.55491351e+00  1.50604216e+00  1.45076266e+00  1.39093001e+00  1.32839926e+00  1.26502541e+00  1.20266351e+00  1.14316856e+00  1.08839560e+00
            28.0000  2.73442322e+00  2.69438041e+00  2.64636879e+00  2.59224339e+00  2.53385921e+00  2.47307130e+00  2.41173467e+00  2.35170436e+00  2.29483537e+00
            44.0000  3.70575425e+00  3.67839216e+00  3.64150060e+00  3.59693461e+00  3.54654920e+00  3.49219939e+00  3.43574022e+00  3.37902671e+00  3.32391388e+00
            60.0000  4.38253894e+00  4.37170974e+00  4.34979043e+00  4.31863603e+00  4.28010155e+00  4.23604204e+00  4.18831250e+00  4.13876797e+00  4.08926347e+00
            76.0000  4.67840964e+00  4.68796551e+00  4.68487062e+00  4.67097998e+00  4.64814862e+00  4.61823157e+00  4.58308384e+00  4.54456047e+00  4.50451648e+00
            92.0000  4.50699869e+00  4.54079181e+00  4.56037352e+00  4.56759882e+00  4.56432275e+00  4.55240034e+00  4.53368660e+00  4.51003657e+00  4.48330526e+00
           108.0000  3.78193844e+00  3.84382099e+00  3.88993146e+00  3.92212489e+00  3.94225629e+00  3.95218069e+00  3.95375312e+00  3.94882860e+00  3.93926215e+00
           124.0000  2.41686123e+00  2.51068538e+00  2.58717680e+00  2.64819053e+00  2.69558157e+00  2.73120497e+00  2.75691574e+00  2.77456891e+00  2.78601950e+00
           140.0000  3.25399400e-01  4.55017329e-01  5.65741881e-01  6.59428081e-01  7.37930952e-01  8.03105521e-01  8.56806811e-01  9.00889847e-01  9.37209654e-01
           156.0000 -2.57881470e+00 -2.40955081e+00 -2.26074095e+00 -2.13053010e+00 -2.01706323e+00 -1.91848531e+00 -1.83294133e+00 -1.75857625e+00 -1.69353505e+00
           172.0000 -6.38214872e+00 -6.16938670e+00 -5.97863936e+00 -5.80805168e+00 -5.65576863e+00 -5.51993519e+00 -5.39869633e+00 -5.29019703e+00 -5.19258226e+00
           180.0000 -8.64797559e+00 -8.41201994e+00 -8.19885930e+00 -8.00663864e+00 -7.83350293e+00 -7.67759716e+00 -7.53706630e+00 -7.41005532e+00 -7.29470920e+00
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     </tableData>
   </table>
  </function>
  <function name="aero/coeff/CMx">
   <description>CMx from Navion_poly.csv, beta x delta_a</description>
   <table>
     <independentVar lookup="row">aero/beta-deg</independentVar>
     <independentVar lookup="column">fcs/aileron-deg</independentVar>
     <tableData>
                                -20             -15             -10              -5               0               5              10              15              20
           -90.0000 -1.87900814e-01 -2.15303398e-01 -2.41301156e-01 -2.66484619e-01 -2.91444320e-01 -3.16770791e-01 -3.43054562e-01 -3.70886166e-01 -4.00856135e-01
           -82.0000 -1.32782417e-01 -1.52642278e-01 -1.71064985e-01 -1.88641070e-01 -2.05961064e-01 -2.23615498e-01 -2.42194905e-01 -2.62289816e-01 -2.84490763e-01
           -74.0000 -9.14633068e-02 -1.04492086e-01 -1.16051383e-01 -1.26731729e-01 -1.37123655e-01 -1.47817694e-01 -1.59404376e-01 -1.72474235e-01 -1.87617801e-01
           -66.0000 -6.23150360e-02 -6.92243739e-02 -7.46319006e-02 -7.91281476e-02 -8.33036468e-02 -8.77489299e-02 -9.30545285e-02 -9.98109744e-02 -1.08608799e-01
           -58.0000 -4.37091555e-02 -4.52106921e-02 -4.51780889e-02 -4.42018777e-02 -4.28725901e-02 -4.17807579e-02 -4.15169129e-02 -4.26715867e-02 -4.58353111e-02
           -50.0000 -3.40172170e-02 -3.08225925e-02 -2.60614998e-02 -2.03244705e-02 -1.42020365e-02 -8.28472937e-03 -3.16308095e-03  5.72377066e-04  2.33111294e-03
           -42.0000 -3.16107720e-02 -2.44316267e-02 -1.56536847e-02 -5.86747767e-03  4.33646256e-03  1.43676043e-02  2.36354158e-02  3.15493654e-02  3.75189213e-02
           -34.0000 -3.48613719e-02 -2.44093461e-02 -1.23261951e-02  7.97549357e-04  1.43713555e-02  2.78046916e-02  4.05070259e-02  5.18878267e-02  6.13565623e-02
           -26.0000 -4.21405683e-02 -2.91273022e-02 -1.44505825e-02  1.29905906e-03  1.75310908e-02  3.36549809e-02  4.90801978e-02  6.32162096e-02  7.54724847e-02
           -18.0000 -5.18199126e-02 -3.69570466e-02 -2.03983985e-02 -2.73450007e-03  1.54441170e-02  3.35469209e-02  5.09833800e-02  6.71629625e-02  8.14951367e-02
           -10.0000 -6.22709564e-02 -4.62701307e-02 -2.85411945e-02 -9.67467954e-03  9.73888254e-03  2.91089600e-02  4.78450210e-02  6.53565339e-02  8.10529670e-02
            -2.0000 -7.18652512e-02 -5.54381062e-02 -3.72505221e-02 -1.78930308e-02  2.04383598e-03  2.19695466e-02  4.12935693e-02  5.94253723e-02  7.57744240e-02
             6.0000 -7.89743485e-02 -6.28325244e-02 -4.48979328e-02 -2.57611055e-02 -6.01257422e-03  1.37571293e-02  3.29574734e-02  5.09979263e-02  6.72879562e-02
            14.0000 -8.19697998e-02 -6.68249369e-02 -4.98549780e-02 -3.16504550e-02 -1.28018996e-02  6.10015661e-03  2.44651818e-02  4.17026442e-02  5.72220121e-02
            22.0000 -7.92231566e-02 -6.57868951e-02 -5.04932093e-02 -3.39326309e-02 -1.66956916e-02  6.27076955e-04  1.74451429e-02  3.31679746e-02  4.72050402e-02
            30.0000 -6.91059704e-02 -5.80899507e-02 -4.51841782e-02 -3.09791847e-02 -1.60655017e-02 -1.03366114e-03  1.35258053e-02  2.70223660e-02  3.88654891e-02
            38.0000 -4.99897927e-02 -4.21056551e-02 -3.22994362e-02 -2.11616678e-02 -9.28288153e-03  2.74639082e-03  1.43356175e-02  2.48942668e-02  3.38318071e-02
            46.0000 -2.02461750e-02 -1.62055598e-02 -1.02105348e-02 -2.85163178e-03  5.28061749e-03  1.35956813e-02  2.15030280e-02  2.84121257e-02  3.37324428e-02
            54.0000  2.17533311e-02  2.12387837e-02  2.27109745e-02  2.55793718e-02  2.92534438e-02  3.31426589e-02  3.66564851e-02  3.92043910e-02  4.01958446e-02
            62.0000  7.76371742e-02  7.18558239e-02  6.80935403e-02  6.57597915e-02  6.42640460e-02  6.30157719e-02  6.14244376e-02  5.88995112e-02  5.48504612e-02
            70.0000  1.49033803e-01  1.37274009e-01  1.27565611e-01  1.19318076e-01  1.11940872e-01  1.04843469e-01  9.74353338e-02  8.91259350e-02  7.93247409e-02
            78.0000  2.37571665e-01  2.19121788e-01  2.02755635e-01  1.87882673e-01  1.73912372e-01  1.60254199e-01  1.46317622e-01  1.31512111e-01  1.15247132e-01
            86.0000  3.44879210e-01  3.19027609e-01  2.95292061e-01  2.73082032e-01  2.51806992e-01  2.30876409e-01  2.09699751e-01  1.87686487e-01  1.64246084e-01
            90.0000  4.06080504e-01  3.76261176e-01  3.48574065e-01  3.22428637e-01  2.97234363e-01  2.72400710e-01  2.47337146e-01  2.21453140e-01  1.94158160e-01
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     </tableData>
   </table>
  </function>
  <function name="aero/coeff/CMy">
   <description>CMy from Navion_poly.csv, alpha x delta_e</description>
   <table>
     <independentVar lookup="row">aero/alpha-deg</independentVar>
     <independentVar lookup="column">fcs/elevator-deg</independentVar>
     <tableData>
                                -20             -15             -10              -5               0               5              10              15              20
          -180.0000  2.64939575e+01  2.60998950e+01  2.56854205e+01  2.52456726e+01  2.47757899e+01  2.42709109e+01  2.37261742e+01  2.31367185e+01  2.24976823e+01
          -164.0000  2.13889222e+01  2.10904636e+01  2.07746494e+01  2.04366181e+01  2.00715083e+01  1.96744585e+01  1.92406074e+01  1.87650935e+01  1.82430555e+01
          -148.0000  1.69305549e+01  1.67181691e+01  1.64914840e+01  1.62456380e+01  1.59757699e+01  1.56770181e+01  1.53445213e+01  1.49734181e+01  1.45588470e+01
          -132.0000  1.30805410e+01  1.29446968e+01  1.27976095e+01  1.26344177e+01  1.24502601e+01  1.22402751e+01  1.19996014e+01  1.17233776e+01  1.14067423e+01
          -116.0000  9.80056574e+00  9.73173186e+00  9.65471123e+00  9.56464243e+00  9.45666405e+00  9.32591468e+00  9.16753291e+00  8.97665732e+00  8.74842651e+00
          -100.0000  7.05231443e+00  7.04095967e+00  7.02447448e+00  6.99799744e+00  6.95666713e+00  6.89562214e+00  6.81000107e+00  6.69494249e+00  6.54558500e+00
           -84.0000  4.79747232e+00  4.83406549e+00  4.86858453e+00  4.89616803e+00  4.91195458e+00  4.91108277e+00  4.88869118e+00  4.83991841e+00  4.75990303e+00
           -68.0000  2.99772471e+00  3.07273459e+00  3.14872665e+00  3.22083949e+00  3.28421170e+00  3.33398185e+00  3.36528854e+00  3.37327036e+00  3.35306589e+00
           -52.0000  1.61475687e+00  1.71865225e+00  1.82658614e+00  1.93369711e+00  2.03512376e+00  2.12600467e+00  2.20147843e+00  2.25668363e+00  2.28675886e+00
           -36.0000  6.10254097e-01  7.33503774e-01  8.63848265e-01  9.96426158e-01  1.12637604e+00  1.24883650e+00  1.35894613e+00  1.45184350e+00  1.52266722e+00
           -20.0000 -5.40983369e-02  7.89744263e-02  2.22198317e-01  3.70711923e-01  5.19653832e-01  6.64162632e-01  7.99376910e-01  9.20435256e-01  1.02247626e+00
            -4.0000 -4.16615146e-01 -2.83250506e-01 -1.36678424e-01  1.82396860e-02  1.76642413e-01  3.33668344e-01  4.84456068e-01  6.24144172e-01  7.47871244e-01
            12.0000 -5.15611049e-01 -3.91485740e-01 -2.51096676e-01 -9.93052699e-02  5.90270663e-02  2.19038921e-01  3.75868881e-01  5.24655535e-01  6.60537470e-01
            28.0000 -3.89400762e-01 -2.84045993e-01 -1.59371156e-01 -2.02376626e-02  1.28493074e-01  2.81959643e-01  4.35300631e-01  5.83654627e-01  7.22160217e-01
            44.0000 -7.62990041e-02  7.54016401e-04  1.00183419e-01  2.17127790e-01  3.46725720e-01  4.84115794e-01  6.24436601e-01  7.62826730e-01  8.94424767e-01
            60.0000  3.85379508e-01  4.24599571e-01  4.89252330e-01  5.74476371e-01  6.75410284e-01  7.87192656e-01  9.04962074e-01  1.02385713e+00  1.13901640e+00
            76.0000  9.57320055e-01  9.49175953e-01  9.69520860e-01  1.01349336e+00  1.07623205e+00  1.15287551e+00  1.23856233e+00  1.32843110e+00  1.41762040e+00
            92.0000  1.60120792e+00  1.53616845e+00  1.50267429e+00  1.49586405e+00  1.51087630e+00  1.54284964e+00  1.58692266e+00  1.63823393e+00  1.69192206e+00
           108.0000  2.27872839e+00  2.14726233e+00  2.05039791e+00  1.98327371e+00  1.94102832e+00  1.91880033e+00  1.91172833e+00  1.91495090e+00  1.92360664e+00
           124.0000  2.95156674e+00  2.74414289e+00  2.57437699e+00  2.43740762e+00  2.32837338e+00  2.24241286e+00  2.17466463e+00  2.12026730e+00  2.07435944e+00
           140.0000  3.58140826e+00  3.28849540e+00  3.03629682e+00  2.81995108e+00  2.63459678e+00  2.47537251e+00  2.33741685e+00  2.21586840e+00  2.10586573e+00
           156.0000  4.12993822e+00  3.74200516e+00  3.39784268e+00  3.09258936e+00  2.82138379e+00  2.57936457e+00  2.36167027e+00  2.16343949e+00  1.97981081e+00
           172.0000  4.55884192e+00  4.06635744e+00  3.62069985e+00  3.21700774e+00  2.85041970e+00  2.51607431e+00  2.20911016e+00  1.92466585e+00  1.65787995e+00
           180.0000  4.71646056e+00  4.16812617e+00  3.66814683e+00  3.21166112e+00  2.79380764e+00  2.40972497e+00  2.05455169e+00  1.72342640e+00  1.41148769e+00
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     </tableData>
   </table>
  </function>
  <function name="aero/coeff/CMz">
   <description>CMz from Navion_poly.csv, beta x delta_r</description>
   <table>
     <independentVar lookup="row">aero/beta-deg</independentVar>
     <independentVar lookup="column">fcs/rudder-deg</independentVar>
     <tableData>
                                -15             -10              -5               0               5              10              15
           -90.0000 -1.10876913e+00 -1.11531497e+00 -1.12037176e+00 -1.12420997e+00 -1.12710004e+00 -1.12931244e+00 -1.13111763e+00
           -82.0000 -8.49417340e-01 -8.53752151e-01 -8.56680391e-01 -8.58472521e-01 -8.59398998e-01 -8.59730285e-01 -8.59736840e-01
           -74.0000 -6.35823257e-01 -6.38127375e-01 -6.39107401e-01 -6.39033795e-01 -6.38177018e-01 -6.36807529e-01 -6.35195787e-01
           -66.0000 -4.63463851e-01 -4.63917613e-01 -4.63129764e-01 -4.61370762e-01 -4.58911068e-01 -4.56021141e-01 -4.52971442e-01
           -58.0000 -3.27816092e-01 -3.26599838e-01 -3.24224451e-01 -3.20960392e-01 -3.17078120e-01 -3.12848095e-01 -3.08540777e-01
           -50.0000 -2.24356953e-01 -2.21651021e-01 -2.17868436e-01 -2.13279657e-01 -2.08155146e-01 -2.02765361e-01 -1.97380763e-01
           -42.0000 -1.48563404e-01 -1.44548133e-01 -1.39538688e-01 -1.33805530e-01 -1.27619118e-01 -1.21249911e-01 -1.14968371e-01
           -34.0000 -9.59124184e-02 -9.07681466e-02 -8.47121808e-02 -7.80149809e-02 -7.09470066e-02 -6.37787178e-02 -5.67805746e-02
           -26.0000 -6.18809670e-02 -5.57880333e-02 -4.88658851e-02 -4.13849822e-02 -3.36157845e-02 -2.58287519e-02 -1.82943441e-02
           -18.0000 -4.19460216e-02 -3.50847647e-02 -2.74767727e-02 -1.93925056e-02 -1.11024231e-02 -2.87698522e-03  5.01334826e-03
           -10.0000 -3.15845540e-02 -2.41353125e-02 -1.60218154e-02 -7.51452270e-03  1.11610586e-03  9.59961037e-03  1.76655310e-02
            -2.0000 -2.62735359e-02 -1.84166485e-02 -9.97798495e-03 -1.22800526e-03  7.56283075e-03  1.61240632e-02  2.41852323e-02
             6.0000 -2.14899390e-02 -1.34057442e-02 -4.82225295e-03  3.99007504e-03  1.27607798e-02  2.12194016e-02  2.90954805e-02
            14.0000 -1.27107349e-02 -4.57957155e-03  3.96840888e-03  1.26627465e-02  2.12329814e-02  2.94086538e-02  3.69193038e-02
            22.0000  4.58710457e-03  1.25848979e-02  2.09170288e-02  2.93130374e-02  3.75024639e-02  4.52148482e-02  5.21797307e-02
            30.0000  3.49266078e-02  4.26106925e-02  5.05466352e-02  5.84639761e-02  6.60922554e-02  7.31610131e-02  7.93997894e-02
            38.0000  8.28308030e-02  9.00208404e-02  9.73802563e-02  1.04638591e-01  1.11525384e-01  1.17770177e-01  1.23102508e-01
            46.0000  1.52822719e-01  1.59338370e-01  1.65940920e-01  1.72359910e-01  1.78324879e-01  1.83565367e-01  1.87810915e-01
            54.0000  2.49425383e-01  2.55086310e-01  2.60751656e-01  2.66150962e-01  2.71013768e-01  2.75069613e-01  2.78048039e-01
            62.0000  3.77161824e-01  3.81787687e-01  3.86335491e-01  3.90534775e-01  3.94115079e-01  3.96805943e-01  3.98336908e-01
            70.0000  5.40555070e-01  5.43965532e-01  5.47215454e-01  5.50034377e-01  5.52151840e-01  5.53297385e-01  5.53200550e-01
            78.0000  7.44128150e-01  7.46142871e-01  7.47914573e-01  7.49172796e-01  7.49647081e-01  7.49066967e-01  7.47161994e-01
            86.0000  9.92404092e-01  9.92842734e-01  9.92955877e-01  9.92473062e-01  9.91123828e-01  9.88637717e-01  9.84744268e-01
            90.0000  1.13471908e+00  1.13430206e+00  1.13351829e+00  1.13209733e+00  1.12976871e+00  1.12626198e+00  1.12130666e+00
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     </tableData>
   </table>
  </function>

  <axis name="DRAG">
   <function name="aero/drag">
    <product>
     <property>aero/qbar-psf</property>
     <property>metrics/Sw-sqft</property>
     <property>aero/coeff/CD</property>
    </product>
   </function>
  </axis>
  <axis name="SIDE">
   <function name="aero/side">
    <product>
     <property>aero/qbar-psf</property>
     <property>metrics/Sw-sqft</property>
     <property>aero/coeff/CY</property>
    </product>
   </function>
  </axis>
  <axis name="LIFT">
   <function name="aero/lift">
    <product>
     <property>aero/qbar-psf</property>
     <property>metrics/Sw-sqft</property>
     <property>aero/coeff/CL</property>
    </product>
   </function>
  </axis>
  <axis name="ROLL">
   <function name="aero/roll">
    <product>
     <property>aero/qbar-psf</property>
     <property>metrics/Sw-sqft</property>
     <property>metrics/bw-ft</property>
     <property>aero/coeff/CMx</property>
    </product>
   </function>
  </axis>
  <axis name="PITCH">
   <function name="aero/pitch">
    <product>
     <property>aero/qbar-psf</property>
     <property>metrics/Sw-sqft</property>
     <property>metrics/cbarw-ft</property>
     <property>aero/coeff/CMy</property>
    </product>
   </function>
  </axis>
  <axis name="YAW">
   <function name="aero/yaw">
    <product>
     <property>aero/qbar-psf</property>
     <property>metrics/Sw-sqft</property>
     <property>metrics/bw-ft</property>
     <property>aero/coeff/CMz</property>
    </product>
   </function>
  </axis>

 </aerodynamics>

</fdm_config>
