<?xml version="1.0"?>
<!-- Generated by tools/jsbsim_validate/gen_jsbsim.py from FALCON-S airframe Volantex_Ranger.
     OpenVSP linear derivative set about alpha = 3.9124 deg, elevator = -4.4425 deg, V = 10.875 m/s.
     Out of ground effect, no engine. Do not hand-edit; regenerate. -->
<fdm_config name="Volantex_Ranger_falcons" version="2.0" release="ALPHA">

 <fileheader>
  <author>tools/jsbsim_validate/gen_jsbsim.py</author>
  <description>FALCON-S Volantex_Ranger, out of ground effect</description>
 </fileheader>

 <metrics>
  <wingarea unit="M2">0.2733</wingarea>
  <wingspan unit="M">1.62</wingspan>
  <chord unit="M">0.156667</chord>
  <!-- Aerodynamic reference point on the CG: FALCON-S applies aerodynamic forces at the CG,
       so any offset here would add a moment arm it does not have. -->
  <location name="AERORP" unit="M"><x>0.0</x><y>0.0</y><z>0.0</z></location>
 </metrics>

 <mass_balance>
  <!-- slug*ft^2, converted here rather than by JSBSim; see KGM2_PER_SLUGFT2 in the generator.
       JSBSim's default cross-product convention puts +ixz at J[0][2], which is the FALCON-S
       inertia matrix entry, so these transfer sign-for-sign. -->
  <ixx unit="SLUG*FT2">0.08356579151</ixx>
  <iyy unit="SLUG*FT2">0.0706584539</iyy>
  <izz unit="SLUG*FT2">0.1506101909</izz>
  <ixy unit="SLUG*FT2">0</ixy>
  <ixz unit="SLUG*FT2">-0.004177552014</ixz>
  <iyz unit="SLUG*FT2">0</iyz>
  <emptywt unit="KG">1.355</emptywt>
  <location name="CG" unit="M"><x>0.0</x><y>0.0</y><z>0.0</z></location>
 </mass_balance>

 <ground_reactions/>
 <propulsion/>

 <flight_control name="command to radians">
  <channel name="surfaces">
    <pure_gain name="fcs/elevator-rad">
     <input>fcs/elevator-cmd-norm</input>
     <gain>0.3490658503988659</gain>
    </pure_gain>
    <pure_gain name="fcs/aileron-rad">
     <input>fcs/aileron-cmd-norm</input>
     <gain>0.2617993877991494</gain>
    </pure_gain>
    <pure_gain name="fcs/rudder-rad">
     <input>fcs/rudder-cmd-norm</input>
     <gain>0.2617993877991494</gain>
    </pure_gain>
  </channel>
 </flight_control>

 <aerodynamics>

   <function name="aero/coeff/CD">
    <description>CD from the OpenVSP derivative set</description>
    <sum>
      <value>0.0390162</value>
      <!-- CD_Alpha -->
      <product><value>0.3222304</value><difference><property>aero/alpha-rad</property><value>0.06828370489499476</value></difference></product>
      <!-- CD_elevator -->
      <product><value>0.0127941</value><difference><property>fcs/elevator-rad</property><value>-0.07753695015154889</value></difference></product>
      <!-- CD_q -->
      <product><value>0.2428005</value><product><property>velocities/q-aero-rad_sec</property><property>aero/ci2vel</property></product></product>
      <!-- induced: k_ind * (CL_Alpha * da)^2 -->
      <product><value>0.0428895961907612</value><pow><product><value>5.5966608</value><difference><property>aero/alpha-rad</property><value>0.06828370489499476</value></difference></product><value>2.0</value></pow></product>
    </sum>
   </function>
   <function name="aero/coeff/CS">
    <description>CS from the OpenVSP derivative set</description>
    <sum>
      <!-- CS_Beta -->
      <product><value>-0.2706484</value><property>aero/beta-rad</property></product>
      <!-- CS_aileron -->
      <product><value>-0.0055261</value><property>fcs/aileron-rad</property></product>
      <!-- CS_rudder -->
      <product><value>-0.1515161</value><property>fcs/rudder-rad</property></product>
      <!-- CS_p -->
      <product><value>0.041014</value><product><property>velocities/p-aero-rad_sec</property><property>aero/bi2vel</property></product></product>
      <!-- CS_r -->
      <product><value>0.2313566</value><product><property>velocities/r-aero-rad_sec</property><property>aero/bi2vel</property></product></product>
    </sum>
   </function>
   <function name="aero/coeff/CL">
    <description>CL from the OpenVSP derivative set</description>
    <sum>
      <value>0.6712056</value>
      <!-- CL_Alpha -->
      <product><value>5.5966608</value><difference><property>aero/alpha-rad</property><value>0.06828370489499476</value></difference></product>
      <!-- CL_elevator -->
      <product><value>0.4037672</value><difference><property>fcs/elevator-rad</property><value>-0.07753695015154889</value></difference></product>
      <!-- CL_q -->
      <product><value>11.545891</value><product><property>velocities/q-aero-rad_sec</property><property>aero/ci2vel</property></product></product>
    </sum>
   </function>
   <function name="aero/coeff/Cl">
    <description>Cl from the OpenVSP derivative set</description>
    <sum>
      <!-- CMl_Beta -->
      <product><value>-0.054114</value><property>aero/beta-rad</property></product>
      <!-- CMl_aileron -->
      <product><value>-0.3515699</value><property>fcs/aileron-rad</property></product>
      <!-- CMl_rudder -->
      <product><value>-0.0005621</value><property>fcs/rudder-rad</property></product>
      <!-- CMl_p -->
      <product><value>-0.5632723</value><product><property>velocities/p-aero-rad_sec</property><property>aero/bi2vel</property></product></product>
      <!-- CMl_r -->
      <product><value>0.1237332</value><product><property>velocities/r-aero-rad_sec</property><property>aero/bi2vel</property></product></product>
    </sum>
   </function>
   <function name="aero/coeff/Cm">
    <description>Cm from the OpenVSP derivative set</description>
    <sum>
      <value>5e-07</value>
      <!-- CMm_Alpha -->
      <product><value>-1.564185</value><difference><property>aero/alpha-rad</property><value>0.06828370489499476</value></difference></product>
      <!-- CMm_elevator -->
      <product><value>-1.5370747</value><difference><property>fcs/elevator-rad</property><value>-0.07753695015154889</value></difference></product>
      <!-- CMm_q -->
      <product><value>-24.652592</value><product><property>velocities/q-aero-rad_sec</property><property>aero/ci2vel</property></product></product>
    </sum>
   </function>
   <function name="aero/coeff/Cn">
    <description>Cn from the OpenVSP derivative set</description>
    <sum>
      <!-- CMn_Beta -->
      <product><value>0.0834299</value><property>aero/beta-rad</property></product>
      <!-- CMn_aileron -->
      <product><value>-0.0029064</value><property>fcs/aileron-rad</property></product>
      <!-- CMn_rudder -->
      <product><value>0.0650262</value><property>fcs/rudder-rad</property></product>
      <!-- CMn_p -->
      <product><value>-0.1014165</value><product><property>velocities/p-aero-rad_sec</property><property>aero/bi2vel</property></product></product>
      <!-- CMn_r -->
      <product><value>-0.0948097</value><product><property>velocities/r-aero-rad_sec</property><property>aero/bi2vel</property></product></product>
    </sum>
   </function>

  <axis name="DRAG">
   <function name="aero/drag">
    <product>
     <property>aero/qbar-psf</property>
     <property>metrics/Sw-sqft</property>
     <property>aero/coeff/CD</property>
    </product>
   </function>
  </axis>
  <axis name="SIDE">
   <function name="aero/side">
    <product>
     <property>aero/qbar-psf</property>
     <property>metrics/Sw-sqft</property>
     <property>aero/coeff/CS</property>
    </product>
   </function>
  </axis>
  <axis name="LIFT">
   <function name="aero/lift">
    <product>
     <property>aero/qbar-psf</property>
     <property>metrics/Sw-sqft</property>
     <property>aero/coeff/CL</property>
    </product>
   </function>
  </axis>
  <axis name="ROLL">
   <function name="aero/roll">
    <product>
     <property>aero/qbar-psf</property>
     <property>metrics/Sw-sqft</property>
     <property>metrics/bw-ft</property>
     <property>aero/coeff/Cl</property>
    </product>
   </function>
  </axis>
  <axis name="PITCH">
   <function name="aero/pitch">
    <product>
     <property>aero/qbar-psf</property>
     <property>metrics/Sw-sqft</property>
     <property>metrics/cbarw-ft</property>
     <property>aero/coeff/Cm</property>
    </product>
   </function>
  </axis>
  <axis name="YAW">
   <function name="aero/yaw">
    <product>
     <property>aero/qbar-psf</property>
     <property>metrics/Sw-sqft</property>
     <property>metrics/bw-ft</property>
     <property>aero/coeff/Cn</property>
    </product>
   </function>
  </axis>

 </aerodynamics>

</fdm_config>
